# 1. | Лабораторная работа №1 студента Помоза Даниила
2.  # а
4*sqrt(5 - 2*sqrt(6))/((nthroot(3, 4) + nthroot(2, 4))*(nthroot(2, 4) - nthroot(3, 4))) = -4
б
y := (sqrt(10^2 + 2) + cos(|2*10 - 1|))/nthroot(10^5 + 8*10 + 2, 4) = 0.623408
в
t := (sum(sin(i/2), i = 1 .. 10) + sum((i - 2)/(i + 2), i = 1 .. 5))/product((2 + 3*i)/(2^2 + 2*i - 2), i = 1 .. 5) = 0.341422
3.
h := -2, -1.8 .. 2
z(h) := (e^(2*h)*nthroot(1 - 4*h, 3))
z(h) = [0.0380981; 0.0550991; 0.0794331; 0.114066; 0.162993; 0.23142; 0.325746; 0.452904; 0.617858; 0.815404; 1; 0.872424; -1.87709; -3.71418; -6.44187; -10.6569; -17.2016; -27.3491; -43.0401; -67.2343; -104.443]
h = [-2; -1.8; -1.6; -1.4; -1.2; -1; -0.8; -0.6; -0.4; -0.2; 0; 0.2; 0.4; 0.6; 0.8; 1; 1.2; 1.4; 1.6; 1.8; 2]
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