# Лабораторная работа №2
# Вариант 2
# Задание 1.Построить графики функций f(x) на отрезке [-3; 3] и найти начальные приближения корней уравнений. Решить уравнения f(x)=0 с точностью =104 с помощью встроенной функции root.
1.
x := -3 .. 3
f(x) := 3*x + cos(x) + 1
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x := 0
root(f(x), x) = -0.607102
2.
x := -3 .. 3
f(x) := (x + 2)*sin(x + 2) - 1
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x := -2
root(f(x), x) = -0.885843
root(f(x), x) = -0.885843
x := 1
# Задание 2. Решить уравнение g(x) = 0  с помощью функции polyroots
x^4 + 6*x^3 + x^2 - 4*x - 60
f(x) := [-60; -4; 1; 6; 1]
x := polyroots(f(x))
x = [-6; -1 - 2i; -1 + 2i; 2]
# Задание 3. Решить систему линейных уравнений: 1) используя функцию Find;  2) матричным способом; 3) используя функцию lsolve.
x1 := 1
x2 := 1
x3 := 1
x4 := 1
# 1. Find
Given
x1 + 2*x2 + 3*x3 + 4*x4 == 22
2*x1 + 3*x2 + x3 + 2*x4 == 17
x1 + x2 + x3 - x4 == 8
x1 - 2*x3 - 3*x4 == -7
S := Find(x1, x2, x3, x4)
S = [4; 1; 4; 1]
2*Матричным*способом
D := [1, 2, 3, 4; 2, 3, 1, 2; 1, 1, 1, -1; 1, 0, -2, -3]
C := [22; 17; 8; -7]
X := D^-1*C
X = [4; 1; 4; 1]
# 3. Используя функия lsolve
h := lsolve(D, C)
h = [4; 1; 4; 1]
# 4.Решить систему нелинейных уравнений с помощью функций Minerr и Given.
x := 0
y := 0
Given
sin(x + 0.5) - y == 1
cos(y - 2) + x + 0 == 0
Minerr(x, y) = [0.537853; -0.138685]
