# Лабораторная работа №3
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limit(1 - z, z → 1)*tan(π*z/2) → 0
y(x) := (e^(2*x)*nthroot(1 - 4*x^2, 3))
d/dx(y(x)) → 2*e^(2*x)*nthroot(1 - 4*x^2, 3) + 8*x*e^(2*x)*nthroot(1 - 4*x^2, 3)/(3*(4*x^2 - 1))
integral(x/(1 + x^2), x) → ln(x^2 + 1)/2
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3*x + cos(x) + 1 == 0
0
(x + 2)*sin(x + 2) - 1 == 0
0
x^4 + 6*x^3 + x^2 - 4*x - 60 == 0
[2; -6; -1 + 2i; -1 - 2i]
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x := -5 .. 5
f1(x) := sqrt(x)
f2(x) := e^x
f3(x) := ln(x)
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j := 0.8, 0.82 .. 1
a := -1.17
f(j) := if(j ≥ 0.85, ln(j), sqrt(|a + j|))
f(j) = [0.608276; 0.591608; 0.574456; -0.150823; -0.127833; -0.105361; -0.0833816; -0.0618754; -0.040822; -0.0202027; 0]
