# Лабораторная работа №4
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z :=
    x ← 4
    z ← (x^2 + 2*x - 3 + (x + 1)*sqrt(x^2 - 9))/(x^2 - 2*x - 3 + (x - 1)*sqrt(x^2 - 9))
    return z
z = 2.64575
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z :=
    b ← 1.5
    for i ∈ 0 .. 9
        Q[i] ←
            x ← 0.1 + i*0.1
            b*x - ln(b)*x if b*x < 1
            1 if b*x == 1
            b*x + ln(b)*x otherwise
    return Q
z = [0.109453; 0.218907; 0.32836; 0.437814; 0.547267; 0.656721; 1.33383; 1.52437; 1.71492; 1.90547]
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F :=
    a ← -1.17
    for i ∈ 0 .. 10
        s[i] ←
            j ← 0.8 + i*0.02
            sqrt(|a + j|) if j < 0.85
            ln(j) otherwise
    return s
F = [0.608276; 0.591608; 0.574456; -0.150823; -0.127833; -0.105361; -0.0833816; -0.0618754; -0.040822; -0.0202027; 0]
